# OpenSim document version 30000
MarkerSet:
  Marker R_AC: torso (-0.0412616 0.430606 0.204367)
  Marker L_AC: torso (-0.0634872 0.446215 -0.201013)
  Marker R_ASIS: pelvis (0.000618674 0.0307006 0.177887)
  Marker L_ASIS: pelvis (-0.00325724 0.0199027 -0.181141)
  Marker R_PSIS: pelvis (-0.21824 0.0228398 0.0535564)
  Marker L_PSIS: pelvis (-0.214593 0.0365292 -0.0756663)
  Marker R_GT: femur_r (0.02816 -0.00690979 0.110668)
  Marker L_GT: femur_l (0.0277626 -0.00711528 -0.129659)
  Marker R_IC: pelvis (-0.0636757 0.126327 0.200222)
  Marker L_IC: pelvis (-0.0611291 0.137944 -0.210967)
  Marker SACRAL: pelvis (-0.231841 0.000666747 -0.0153231)
  Marker R_THIGH_PROX_POST: femur_r (-0.0252666 -0.13277 0.0935927)
  Marker R_THIGH_PROX_ANT: femur_r (0.0447767 -0.1156 0.102262)
  Marker R_THIGH_DIST_ANT: femur_r (0.0460287 -0.207069 0.0947526)
  Marker R_THIGH_DIST_POST: femur_r (-0.0209513 -0.222098 0.0861182)
  Marker R_LAT_KNEE: femur_r (-0.0207229 -0.414459 0.0518074) fixed=true
  Marker R_MED_KNEE: femur_r (0 -0.418603 -0.0518074) fixed=true
  Marker R_LL_PROX_POST: tibia_r (-0.026519 -0.186786 0.0915855)
  Marker R_LL_PROX_ANT: tibia_r (-0.0954175 -0.184824 0.0678617)
  Marker R_LL_DIST_ANT: tibia_r (-0.0709734 -0.26455 0.0645039)
  Marker R_LL_DIST_POST: tibia_r (-0.0163421 -0.261606 0.0792202)
  Marker R_LAT_ANK: tibia_r (-0.00579289 -0.475017 0.0614046) fixed=true
  Marker R_MED_ANK: tibia_r (0.0148943 -0.463431 -0.0426559) fixed=true
  Marker R_HEEL_SUP: calcn_l (-0.0346702 0.0375108 -0.0128679)
  Marker R_HEEL_MED: calcn_l (-0.0238839 0.00928533 -0.0387258)
  Marker R_HEEL_LAT: calcn_l (-0.0288995 0.0154797 0.0230257)
  Marker R_TOE: toes_l (0.0850933 0.029083 0.00141052)
  Marker L_THIGH_PROX_POST: femur_l (0.00670362 -0.145574 -0.109629)
  Marker L_THIGH_PROX_ANT: femur_l (0.0741763 -0.156018 -0.0879005)
  Marker L_THIGH_DIST_ANT: femur_l (0.0722525 -0.229183 -0.0750046)
  Marker L_THIGH_DIST_POST: femur_l (0.0101414 -0.220695 -0.0940844)
  Marker L_LAT_KNEE: femur_l (-0.0150849 -0.404254 -0.0641038)
  Marker L_MED_KNEE: femur_l (0.00224088 -0.421135 0.0931702)
  Marker L_PROS_PROX_POST: pylon_socket (-0.0166954 0.009625 -0.0705262)
  Marker L_PROS_PROX_ANT: pylon_socket (0.0373553 0.0157963 -0.0587485)
  Marker L_PROS_DIST_ANT: pylon_socket (0.0355555 -0.0397749 -0.0513434)
  Marker L_PROS_DIST_POST: pylon_socket (-0.0161027 -0.053036 -0.0613279)
  Marker L_LAT_ANK: pylon_socket (-0.0192917 -0.362251 -0.0392593)
  Marker L_MED_ANK: pylon_socket (0.00691251 -0.350069 0.0266753)
  Marker L_HEEL_SUP: foot2 (-0.135194 -0.00811911 -0.0062929)
  Marker L_HEEL_MED: foot2 (-0.114634 -0.0311425 0.0296537)
  Marker L_HEEL_LAT: foot2 (-0.118521 -0.0366905 -0.0338194)
  Marker L_TOE: foot2 (0.183823 0.0435436 0.000460908)
  Marker R_1ST_MET: toes_l (0.00277608 0.0145587 -0.0481043)
  Marker R_5TH_MET: toes_l (-0.0323981 0.0129475 0.0842059)
  Marker L_1ST_MET: foot2 (0.105001 0.010184 0.0533794)
  Marker L_5TH_MET: foot2 (0.0850077 -0.0107643 -0.0762998)
